# ====================================================================== #
# Equilibrate a test system of 20 polymers of length 1000 and 500 tetrahedral
# crosslinkers in implicit solvent.
#
# Authors:
#     Kee-Myoung Nam
#
# Last updated:
#     8/17/2024
# ====================================================================== #
# INPUT VARIABLES
# ===============
variable f file ${VARS}
variable init_filename string $f
next f
variable lammpstrj_filename string $f
next f
variable bond_filename string $f
next f
variable angle_filename string $f
next f
variable unbonded_template string $f
next f
variable bonded_template string $f
next f
variable forward_map string $f

# ====================================================================== #
# INITIALIZATION
# ==============
# Use nano units (nm, ag, ns, K; 1 kT = 4.141947 ag*nm^2/ns^2) in 3 dimensions
units nano
dimension 3

# Use FENE bonds for polymeric bonds and harmonic bonds for polymer/crosslinker
# bonds
atom_style angle
bond_style hybrid fene harmonic

# Subject polymeric and crosslinker bond angles to a cosine angle potential
angle_style cosine/delta

# Use Lennard-Jones potentials between unbonded molecules
#
# Note that the 2.5 * \sigma cutoff ratio is re-written below when the initial
# configuration file is parsed
pair_style lj/cut 6.6817403861

# Use periodic boundary conditions in all 3 dimensions
boundary p p p

# Maintain neighbor lists with given additional "skin" distance
#
# Skin distance is set to 0.3 * \sigma, where \sigma = 3 nm / (2^(1/6))
neighbor 0.8018088463 bin

# Build neighbor lists at every timestep
neigh_modify every 1 delay 1

# ====================================================================== #
# PARSE INPUT MOLECULES
# =====================
# Allow for one additional bond for each atom
read_data ${init_filename} extra/bond/per/atom 1 extra/special/per/atom 10
pair_modify shift yes

# - Exclude Lennard-Jones potential contributions between FENE-bonded atoms
# - Weight Lennard-Jones potential contributions between 1-3 atoms with angles
special_bonds fene angle no

# ====================================================================== #
# PRINT THERMODYNAMIC INFORMATION DURING MINIMIZATION
# ===================================================
thermo 10
thermo_style custom step temp pe ke etotal epair ebond eangle press

# ====================================================================== #
# ENERGY MINIMIZATION
# ===================
minimize 1.0e-4 1.0e-6 5000 10000

# ====================================================================== #
# DEFINE INITIAL VELOCITIES
# =========================
# Set initial velocities of all molecules from a Gaussian distribution with
# angular momenta set to zero
variable temp equal 300.0
velocity all create ${temp} 1234 rot yes dist gaussian

# ====================================================================== #
# PRINT THERMODYNAMIC INFORMATION DURING SIMULATION
# =================================================
thermo 1000
thermo_style custom step temp press vol pxx pyy pzz etotal epair ebond eangle

# ====================================================================== #
# SET UP AND RUN INITIAL EQUILIBRATION
# ====================================
variable dt equal 0.0001
timestep ${dt}
reset_timestep 0

# Equilibrate using the NVE ensemble and Langevin thermostat (i.e., NVT ensemble)
fix fxinit1 all nve
fix fxinit2 all langevin ${temp} ${temp} $(dt/20) 12345 scale 2 20 scale 3 20

run 100000

# ====================================================================== #
# SET UP SIMULATION
# =================
variable dt equal 0.0001
timestep ${dt}
reset_timestep 0

# Write polymer and crosslinker coordinates from simulation to file:
# - Write every 2000 timesteps
# - Write atom ID, molecule ID, atom type, and atom coordinates
# - Sort lines by atom ID
dump 1 all custom 10000 lammpstrj_filename id mol type xu yu zu vx vy vz
dump_modify 1 sort id

# Write bond lengths and energies to file
compute 1 all property/local btype batom1 batom2
compute 2 all bond/local dist engpot force
dump 2 all local 10000 bond_filename index c_1[*] c_2[*]
dump_modify 2 sort 2

# Write bond angles and energies to file
compute 3 all property/local atype aatom1 aatom2 aatom3
compute 4 all angle/local theta eng
dump 3 all local 10000 angle_filename index c_3[*] c_4[*]
dump_modify 3 sort 2

# ====================================================================== #
# DEFINE MOLECULE TEMPLATES
# =========================
# Molecule templates for bonding reactions
molecule forward_unreacted unbonded_template
molecule forward_reacted bonded_template

# ====================================================================== #
# DEFINE POLYMER/CROSSLINKER BONDING REACTION
# ===========================================
# - Apply reaction site stabilization (apply nve/limit to reacting atoms
#   for fixed number of timesteps to disallow immediate participation in
#   further reactions)
# - Perform bonding reaction (rxn1) if reacting atoms are within distance
#   [0, 3.3] (3 nm = harmonic bond equilibrium length)
# - Set prob = 1.0 to ensure that the reaction proceeds if all constraints
#   (including the Arrhenius constraint) is satisfied
variable eqlen equal 3.0
fix myrxns all bond/react stabilization yes statted_group 0.5 &
    react rxn1 all 1 0.0 $(eqlen*1.1) forward_unreacted forward_reacted forward_map prob 1.0 123456

# ====================================================================== #
# SET UP ENSEMBLES
# ================
# - Apply NVT ensemble on unreacting atoms throughout the simulation
# - Apply Langevin dynamics on reacting atoms throughout the simulation
fix fx1 statted_group_REACT nve
fix fx2 statted_group_REACT langevin ${temp} ${temp} $(dt/20) 1234567 scale 2 20 scale 3 20

# ====================================================================== #
# RUN SIMULATION
# ==============
run 10000000
